*Heading
** Job name: Analysis-ShellBeam-origprop Model name: Shell-Beam
** Generated by: Abaqus/CAE 2019
*Preprint, echo=NO, model=NO, history=NO, contact=NO
**
** PARTS
**
*Part, name=LARCH
*Node
      1,           0.,   737.419983,           0.
      2,   119.889999,   679.950012,           0.
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*Element, type=B32
1,  1, 51, 11
2, 11, 52, 12
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*Nset, nset=_PickedSet2, internal, generate
  1,  99,   1
*Elset, elset=_PickedSet2, internal, generate
  1,  49,   1
*Orientation, name=Ori-1
1., 0., 0., 0., 1., 0.
2, 90.
** Section: LARCH  Profile: TARCH-RARCH-LARCH
*Beam General Section, elset=_PickedSet2, poisson = 0.2, section=GENERAL
3100., 1.21e+06, 0., 510000., 1.37e+06
0.,0.,-1.
500., 208.33
*Section Points
0., 0.
*End Part
**
*Part, name=LConFill
*Node
      1,    542.51001,           0.,        472.5
      2,   551.146667,           0.,   461.106659
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*Element, type=C3D8R
 1,  17,  18,  22,  21,   1,   2,   6,   5
 2,  18,  19,  23,  22,   2,   3,   7,   6
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*Node
    177,           0.,           0.,           0.
*Nset, nset=LConFill-RefPt_, internal
177,
*Nset, nset=_PickedSet43, internal, generate
   1,  176,    1
*Elset, elset=_PickedSet43, internal, generate
  1,  90,   1
** Section: CONFILL
*Solid Section, elset=_PickedSet43, material=GRAVEL
,
*End Part
**
*Part, name=LWEB
*Node
      1,           0.,   737.419983,         52.5
      2,           0.,   737.419983,         105.
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*Element, type=S3
1,  82,  78,  74
2,  88,  11,  12
3,  64, 110,  65
*Element, type=S4R
 4,  31,   9,   1, 103
 5,  33,  32, 113,  87
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*Node
    118,           0.,           0.,           0.
*Nset, nset=LWEB-RefPt_, internal
118,
*Nset, nset=_PickedSet31, internal, generate
   1,  117,    1
*Elset, elset=_PickedSet31, internal, generate
  1,  92,   1
*Nset, nset=_PickedSet43, internal, generate
 10,  29,   1
*Elset, elset=_PickedSet43, internal
  2, 20, 21, 30, 31, 33
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*Elset, elset=__PickedSurf42_SPOS, internal, generate
  1,  92,   1
*Surface, type=ELEMENT, name=_PickedSurf42, internal
__PickedSurf42_SPOS, SPOS
*Distribution, name=Ori-1-DiscOrient, location=ELEMENT, Table=Ori-1-DiscOrient_Table
** Description: Distribution generated from Discrete Orientation
,           1.,           0.,           0.,           0.,           1.,           0.
1, -0.0349918156862259, -0.0480914637446404, 0.99822986125946, 0.833492338657379, -0.552524924278259, 0.00259827845729887
2, -0.011846131645143, -0.0247318092733622, 0.999623954296112, 0.90204519033432, -0.431641697883606, 1.04700757219689e-05
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92, -0.0552656948566437, -0.0617553070187569, 0.996560096740723, 0.769110321998596, -0.639108836650848, 0.0030475405510515
*Orientation, name=Ori-1, system=RECTANGULAR
Ori-1-DiscOrient
3, 0.
** Section: WEB
*Shell Section, elset=_PickedSet31, material=WEB, orientation=Ori-1
35., 5
*End Part
**
*Part, name=NARCH
*Node
      1,           0.,   737.419983,           0.
      2,   120.239998,   681.890015,           0.
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*Element, type=B32
1,  1, 51, 11
2, 11, 52, 12
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*Nset, nset=_PickedSet2, internal, generate
  1,  99,   1
*Elset, elset=_PickedSet2, internal, generate
  1,  49,   1
*Orientation, name=Ori-1
1., 0., 0., 0., 1., 0.
2, 90.
** Section: NARCH  Profile: NARCH
*Beam General Section, elset=_PickedSet2, poisson = 0.2, section=GENERAL
18600., 2.793e+07, 1.7e+06, 4.245e+07, 5.734e+07
0.,0.,-1.
500., 208.33
*Centroid
68.35, 59.6461
*Section Points
0., 0.
*End Part
**
*Part, name=NConFill
*Node
      1,   554.780029,           0.,  -540.969971
      2,   583.640015,           0.,  -540.969971
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*Element, type=C3D8R
 1,  16,  17,  20,  19,   1,   2,   5,   4
 2,  17,  18,  21,  20,   2,   3,   6,   5
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*Node
    136,           0.,           0.,           0.
*Nset, nset=NConFill-RefPt_, internal
136,
*Nset, nset=_PickedSet33, internal, generate
   1,  135,    1
*Elset, elset=_PickedSet33, internal, generate
  1,  64,   1
** Section: CONFILL
*Solid Section, elset=_PickedSet33, material=GRAVEL
,
*End Part
**
*Part, name=NWEB
*Node
      1,           0.,   737.419983,  -491.790924
      2,           0.,   737.419983,  -442.611816
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*Element, type=S3
1,  90,  91,  99
2, 135, 106, 115
3,  78,  86, 152
4, 145, 140,  71
5, 154,  82, 156
*Element, type=S4R
  6, 122, 124, 120, 119
  7, 118, 121, 119, 116
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*Node
    157,           0.,           0.,           0.
*Nset, nset=NWEB-RefPt_, internal
157,
*Nset, nset=_PickedSet31, internal, generate
   1,  156,    1
*Elset, elset=_PickedSet31, internal, generate
   1,  130,    1
*Nset, nset=_PickedSet39, internal
 11, 36, 37, 38, 39, 40
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*Elset, elset=_PickedSet39, internal
  21,  31,  33,  41,  48,  55
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*Elset, elset=__PickedSurf38_SPOS, internal, generate
   1,  130,    1
*Surface, type=ELEMENT, name=_PickedSurf38, internal
__PickedSurf38_SPOS, SPOS
*Distribution, name=Ori-1-DiscOrient-1, location=ELEMENT, Table=Ori-1-DiscOrient-1_Table
** Description: Distribution generated from Discrete Orientation
,           1.,           0.,           0.,           0.,           1.,           0.
1, 0.0281814634799957, 0.0413678996264935, 0.998746454715729, 0.846114695072174, -0.532997846603394, -0.00179800391197205
2, 0.0164367463439703, 0.0281748063862324, 0.99946790933609, 0.87593799829483, -0.482423007488251, -0.00080582476221025
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130, 0.0588378384709358, 0.0366691239178181, 0.997593820095062, 0.518514215946198, -0.855068564414978, 0.000848394876811653
*Orientation, name=Ori-1, system=RECTANGULAR
Ori-1-DiscOrient-1
3, 0.
** Section: WEB
*Shell Section, elset=_PickedSet31, material=WEB, orientation=Ori-1
35., 5
*End Part
**
*Part, name=RARCH
*Node
      1,           0.,   737.419983,           0.
      2,   124.559998,   706.429993,           0.
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*Element, type=B32
1,  1, 56, 11
2, 11, 57, 12
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*Nset, nset=_PickedSet2, internal, generate
   1,  109,    1
*Elset, elset=_PickedSet2, internal, generate
  1,  54,   1
*Orientation, name=Ori-1
1., 0., 0., 0., 1., 0.
2, 90.
** Section: RARCH  Profile: TARCH-RARCH-LARCH
*Beam General Section, elset=_PickedSet2, poisson = 0.2, section=GENERAL
3100., 1.21e+06, 0., 510000., 1.37e+06
0.,0.,-1.
500., 208.33
*Section Points
0., 0.
*End Part
**
*Part, name=TARCH
*Node
      1,           0.,   737.419983,           0.
      2,   115.089996,   652.690002,           0.
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*Element, type=B32
1,  1, 47, 11
2, 11, 48, 12
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*Nset, nset=_PickedSet2, internal, generate
  1,  91,   1
*Elset, elset=_PickedSet2, internal, generate
  1,  45,   1
*Orientation, name=Ori-1
1., 0., 0., 0., 1., 0.
2, 90.
** Section: TARCH  Profile: TARCH-RARCH-LARCH
*Beam General Section, elset=_PickedSet2, poisson = 0.2, section=GENERAL
3100., 1.21e+06, 0., 510000., 1.37e+06
0.,0.,-1.
500., 208.33
*Section Points
0., 0.
*End Part
**
*Part, name=TWEB-merged
*Node
      1,           0.,   737.419983,           0.
      2,        612.5,   737.419983,           0.
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*Element, type=S3
1, 165, 164, 163
2,  30,  98,  29
3, 123, 172, 122
109, 202, 203, 197
110, 175,  74,  75
111, 178, 181, 177
112, 239, 250, 222
113, 209, 253, 194
*Element, type=S4R
  4,  55,   1,   7, 163
  5,  54, 164, 151,  53
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*Nset, nset=_PickedSet31_#7, internal
   1,   2,   5,   6,   7,   8
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*Elset, elset=_PickedSet31_#7, internal, generate
 109,  217,    1
*Nset, nset=_PickedSet32_#8, internal
   1,   2,   5,   6,   7,   8
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*Elset, elset=_PickedSet32_#8, internal, generate
 109,  217,    1
*Nset, nset=_PickedSet2_#8, internal
   1,   2,   3,   4,   7,   8
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*Elset, elset=_PickedSet2_#8, internal, generate
   1,  108,    1
*Nset, nset=_PickedSet3_#9, internal
   1,   2,   3,   4,   7,   8
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*Elset, elset=_PickedSet3_#9, internal, generate
   1,  108,    1
*Nset, nset=_PickedSet11, internal
  2,  6, 77, 78, 79, 80
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*Elset, elset=_PickedSet11, internal
 141, 149, 153, 161, 164, 167
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*Nset, nset=_PickedSet14, internal
  2,  3, 18, 19, 20, 21
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*Elset, elset=_PickedSet14, internal
  2, 15, 23, 24, 47, 55
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*Elset, elset=__PickedSurf10_SPOS, internal, generate
 109,  217,    1
*Surface, type=ELEMENT, name=_PickedSurf10, internal
__PickedSurf10_SPOS, SPOS
*Elset, elset=__PickedSurf13_SPOS, internal, generate
   1,  108,    1
*Surface, type=ELEMENT, name=_PickedSurf13, internal
__PickedSurf13_SPOS, SPOS
*Distribution, name=Ori-2-DiscOrient, location=ELEMENT, Table=Ori-2-DiscOrient_Table
** Description: Distribution generated from Discrete Orientation
,           1.,           0.,           0.,           0.,           1.,           0.
1,           1.,           0.,           0.,           0., -0.346165239810944, -0.938173472881317
2, 0.991911888122559, -0.0395010225474834, 0.120625786483288, 0.00191732484381646, -0.945571064949036, -0.325410038232803
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108, 0.997252583503723, -0.0506892390549183, 0.0540178306400776, 0.00216820603236556, -0.708930790424347, -0.705274760723114
*Orientation, name=Ori-2, system=RECTANGULAR
Ori-2-DiscOrient
3, 0.
** Section: WEB
*Shell Section, elset=_PickedSet2_#8, material=WEB, orientation=Ori-2
35., 5
*Distribution, name=Ori-1-DiscOrient-2, location=ELEMENT, Table=Ori-1-DiscOrient-2_Table
** Description: Distribution generated from Discrete Orientation
,           1.,           0.,           0.,           0.,           1.,           0.
109, -0.996790051460266, 0.0517798475921154, 0.0610608197748661, 0.00360157573595643, -0.732915699481964, 0.680309891700745
110, -0.963401317596436, 0.0401442125439644, 0.26504048705101, 0.00249460525810719, -0.987337470054626, 0.158614218235016
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217,          -1.,           0.,           0.,           0., -0.346165269613266, 0.938173592090607
*Orientation, name=Ori-1, system=RECTANGULAR
Ori-1-DiscOrient-2
3, 0.
** Section: WEB
*Shell Section, elset=_PickedSet31_#7, material=WEB, orientation=Ori-1
35., 5
*End Part
**
**
** ASSEMBLY
**
*Assembly, name=Assembly
**
*Instance, name=LARCH-1, part=LARCH
          0.,           0.,        472.5
*End Instance
**
*Instance, name=LWEB-1, part=LWEB
*End Instance
**
*Instance, name=RARCH-1, part=RARCH
          0.,           0.,           0.
          0.,           0.,           0.,           0., -1.00000000241892,           0., 37.6400011155629
*End Instance
**
*Instance, name=NARCH-1, part=NARCH
          0.,           0.,      -540.97
*End Instance
**
*Instance, name=NWEB-1, part=NWEB
*End Instance
**
*Instance, name=RARCH-2, part=RARCH
          0.,           0.,           0.
          0.,           0.,           0.,           0., 1.00000000241892,           0., 37.6400011155629
*End Instance
**
*Instance, name=TARCH-1, part=TARCH
       612.5,           0.,           0.
       612.5,           0.,           0.,        612.5, -1.00000001268805,           0., 89.9999992730282
*End Instance
**
*Instance, name=TARCH-2, part=TARCH
       612.5,           0., -4.36680238635745e-07
       612.5,           0., -4.36680238635745e-07,        612.5, 1.00000001268805, -4.36680238635745e-07, 89.9999992730282
*End Instance
**
*Instance, name=TWEB-merged-1, part=TWEB-merged
*End Instance
**
*Instance, name=LConFill-1, part=LConFill
*End Instance
**
*Instance, name=NConFill-1, part=NConFill
*End Instance
**
*Nset, nset="LARCH-RARCH - slaves", instance=LARCH-1, generate
  1,  99,   1
*Nset, nset="LARCH-RARCH - slaves", instance=RARCH-1, generate
   1,  109,    1
*Elset, elset="LARCH-RARCH - slaves", instance=LARCH-1, generate
  1,  49,   1
*Elset, elset="LARCH-RARCH - slaves", instance=RARCH-1, generate
  1,  54,   1
*Nset, nset="LWEB - master edges", instance=LWEB-1, generate
  9,  51,   1
*Elset, elset="LWEB - master edges", instance=LWEB-1
  2,  4,  5,  7,  9, 11
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*Nset, nset="LWEB-NWEB - symmetry edges", instance=LWEB-1, generate
  1,  10,   1
*Nset, nset="LWEB-NWEB - symmetry edges", instance=NWEB-1, generate
  1,  12,   1
*Elset, elset="LWEB-NWEB - symmetry edges", instance=LWEB-1
  4,  6, 24, 25, 35, 36, 38, 46, 84
*Elset, elset="LWEB-NWEB - symmetry edges", instance=NWEB-1
  10,  12,  19,  20,  21,  22,  24,  26, 110, 115, 126
*Nset, nset="NARCH-RARCH2 - slaves", instance=NARCH-1, generate
  1,  99,   1
*Nset, nset="NARCH-RARCH2 - slaves", instance=RARCH-2, generate
   1,  109,    1
*Elset, elset="NARCH-RARCH2 - slaves", instance=NARCH-1, generate
  1,  49,   1
*Elset, elset="NARCH-RARCH2 - slaves", instance=RARCH-2, generate
  1,  54,   1
*Nset, nset="NWEB - master edges", instance=NWEB-1
 11, 12, 13, 14, 15, 16
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*Nset, nset="RARCH-TARCH-RARCH2-TARCH2 - masters", instance=RARCH-1, generate
   1,  109,    1
*Nset, nset="RARCH-TARCH-RARCH2-TARCH2 - masters", instance=TARCH-1, generate
  1,  91,   1
*Nset, nset="RARCH-TARCH-RARCH2-TARCH2 - masters", instance=TARCH-2, generate
  1,  91,   1
*Nset, nset="RARCH-TARCH-RARCH2-TARCH2 - masters", instance=RARCH-2, generate
   1,  109,    1
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*Nset, nset="TWEB-merged - slave edges", instance=TWEB-merged-1
  1,  2,  3,  4,  5,  6
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*Nset, nset="boundary support edges", instance=LWEB-1
 29, 30
*Nset, nset="boundary support edges", instance=TWEB-merged-1, generate
 3,  6,  1
*Nset, nset="boundary support edges", instance=NWEB-1, generate
 34,  36,   1
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*Nset, nset=_PickedSet85, internal, instance=LWEB-1, generate
 10,  29,   1
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*Elset, elset=_PickedSet90, internal, instance=LARCH-1, generate
  1,  49,   1
*Elset, elset=_PickedSet90, internal, instance=RARCH-1, generate
  1,  54,   1
*Elset, elset=_PickedSet90, internal, instance=TARCH-1, generate
  1,  45,   1
*Elset, elset=_PickedSet90, internal, instance=TARCH-2, generate
  1,  45,   1
*Elset, elset=_PickedSet90, internal, instance=RARCH-2, generate
  1,  54,   1
*Nset, nset=_PickedSet91, internal, instance=NARCH-1, generate
  1,  99,   1
*Elset, elset=_PickedSet91, internal, instance=NARCH-1, generate
  1,  49,   1
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*Elset, elset=_PickedSet102, internal, instance=LWEB-1, generate
  1,  92,   1
*Elset, elset=_PickedSet102, internal, instance=TWEB-merged-1, generate
   1,  217,    1
*Elset, elset=_PickedSet102, internal, instance=NWEB-1, generate
   1,  130,    1
*Nset, nset=_PickedSet117, internal, instance=NConFill-1, generate
   1,  135,    1
*Elset, elset=_PickedSet117, internal, instance=NConFill-1, generate
  1,  64,   1
*Nset, nset=_PickedSet122, internal, instance=LConFill-1
   1,   2,   3,   4,   5,   6
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*Nset, nset=_PickedSet122, internal, instance=NConFill-1
   1,   2,   3,   4,   5,   6
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*Elset, elset=_PickedSet124, internal, instance=LWEB-1, generate
  1,  92,   1
*Elset, elset=_PickedSet124, internal, instance=TWEB-merged-1, generate
   1,  217,    1
*Elset, elset=_PickedSet124, internal, instance=NWEB-1, generate
   1,  130,    1
*Elset, elset=__PickedSurf118_SPOS, internal, instance=LWEB-1, generate
  1,  92,   1
*Elset, elset=__PickedSurf118_SPOS, internal, instance=TWEB-merged-1, generate
 109,  217,    1
*Surface, type=ELEMENT, name=_PickedSurf118, internal
__PickedSurf118_SPOS, SPOS
*Elset, elset=__PickedSurf119_S3, internal, instance=LConFill-1
  1,  2,  3, 10, 11, 12
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*Elset, elset=__PickedSurf119_S4, internal, instance=LConFill-1, generate
  3,  90,   3
*Surface, type=ELEMENT, name=_PickedSurf119, internal
__PickedSurf119_S3, S3
__PickedSurf119_S4, S4
*Elset, elset=__PickedSurf120_SPOS, internal, instance=NWEB-1, generate
   1,  130,    1
*Elset, elset=__PickedSurf120_SPOS, internal, instance=TWEB-merged-1, generate
   1,  108,    1
*Surface, type=ELEMENT, name=_PickedSurf120, internal
__PickedSurf120_SPOS, SPOS
*Elset, elset=__PickedSurf121_S5, internal, instance=NConFill-1
  7,  8, 15, 16, 23, 24, 31, 32, 39, 40, 47, 48, 55, 56, 63, 64
*Elset, elset=__PickedSurf121_S6, internal, instance=NConFill-1, generate
  1,  63,   2
*Surface, type=ELEMENT, name=_PickedSurf121, internal
__PickedSurf121_S5, S5
__PickedSurf121_S6, S6
*Surface, type=NODE, name="LWEB - master edges_CNS_", internal
"LWEB - master edges", 1.
*Surface, type=NODE, name="LARCH-RARCH - slaves_CNS_", internal
"LARCH-RARCH - slaves", 1.
*Surface, type=NODE, name="NWEB - master edges_CNS_", internal
"NWEB - master edges", 1.
*Surface, type=NODE, name="NARCH-RARCH2 - slaves_CNS_", internal
"NARCH-RARCH2 - slaves", 1.
*Surface, type=NODE, name="RARCH-TARCH-RARCH2-TARCH2 - masters_CNS_", internal
"RARCH-TARCH-RARCH2-TARCH2 - masters", 1.
*Surface, type=NODE, name="TWEB-merged - slave edges_CNS_", internal
"TWEB-merged - slave edges", 1.
** Constraint: LWEB-LFILL
*Tie, name=LWEB-LFILL, adjust=yes, no rotation
_PickedSurf119, _PickedSurf118
** Constraint: LWEB-RARCH-LARCH
*Tie, name=LWEB-RARCH-LARCH, adjust=yes, no rotation
"LARCH-RARCH - slaves_CNS_", "LWEB - master edges_CNS_"
** Constraint: NWEB-NFILL
*Tie, name=NWEB-NFILL, adjust=yes, no rotation
_PickedSurf121, _PickedSurf120
** Constraint: NWEB-RARCH2-NARCH
*Tie, name=NWEB-RARCH2-NARCH, adjust=yes, no rotation
"NARCH-RARCH2 - slaves_CNS_", "NWEB - master edges_CNS_"
** Constraint: RARCH-TARCH-TWEB-merged
*Tie, name=RARCH-TARCH-TWEB-merged, adjust=yes, no rotation
"TWEB-merged - slave edges_CNS_", "RARCH-TARCH-RARCH2-TARCH2 - masters_CNS_"
*End Assembly
*Distribution Table, name=Ori-1-DiscOrient_Table
coord3D, coord3D
*Distribution Table, name=Ori-1-DiscOrient-1_Table
coord3D, coord3D
*Distribution Table, name=Ori-2-DiscOrient_Table
coord3D, coord3D
*Distribution Table, name=Ori-1-DiscOrient-2_Table
coord3D, coord3D
**
** MATERIALS
**
*Material, name=GRAVEL
*Density
 8.564e-06,
*Elastic
500., 0.2
*Material, name=WEB
*Elastic, type=LAMINA
4200.,   670.,    0.3, 380.78, 380.78, 380.78
**
** INTERACTION PROPERTIES
**
*Surface Interaction, name=INTPROP
1.,
*Friction, slip tolerance=0.005
 0.7,
*Surface Behavior, pressure-overclosure=HARD
**
** BOUNDARY CONDITIONS
**
** Name: BaseSup Type: Symmetry/Antisymmetry/Encastre
*Boundary
"boundary support edges", PINNED
** Name: FillSup Type: Symmetry/Antisymmetry/Encastre
*Boundary
_PickedSet122, PINNED
** Name: VaultSymm Type: Symmetry/Antisymmetry/Encastre
*Boundary
"LWEB-NWEB - symmetry edges", XSYMM
** Name: WallSup Type: Symmetry/Antisymmetry/Encastre
*Boundary
_PickedSet85, ENCASTRE
**
** INTERACTIONS
**
** Interaction: GINT
*Contact
*Contact Inclusions, ALL EXTERIOR
*Contact Property Assignment
 ,  , INTPROP
** ----------------------------------------------------------------
**
** STEP: STATIC
**
*Step, name=STATIC, nlgeom=NO
*Static
0.001, 1., 1e-10, 1.
**
** LOADS
**
** Name: DEAD   Type: Body force
*Dload
_PickedSet124, BY, -5.87e-05
** Name: FILL   Type: Gravity
*Dload
_PickedSet117, GRAV, 1., 0., -1., 0.
** Name: SW   Type: Body force
*Dload
_PickedSet102, BY, -5.78e-05
** Name: SW - LARCH-RARCH-TARCH   Type: Line load
*Dload
_PickedSet90, PY, -0.1674
** Name: SW - NARCH   Type: Line load
*Dload
_PickedSet91, PY, -1.0044
**
** CONTROLS
**
*Controls, reset
**
** OUTPUT REQUESTS
**
*Restart, write, frequency=0
**
** FIELD OUTPUT: F-Output-1
**
*Output, field
*Node Output
CF, RF, U
*Element Output, directions=YES
BF, DAMAGEC, DAMAGET, E, EE, MISES, PE, PEEQ, PEMAG, S
*Contact Output
CDISP, CSTRESS
**
** HISTORY OUTPUT: H-Output-1
**
*Output, history, variable=PRESELECT
*End Step
