*Heading
** Job name: Analysis-ShellShell-upprop Model name: Shell-Shell
** Generated by: Abaqus/CAE 2019
*Preprint, echo=NO, model=NO, history=NO, contact=NO
**
** PARTS
**
*Part, name=LARCH
*Node
      1,           0.,   737.419983,   494.829987
      2,           0.,   737.419983,        472.5
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*Element, type=S4R
 1,   1,   2,   5,   4
 2,   2,   3,   6,   5
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*Node
    148,           0.,           0.,           0.
*Nset, nset=LARCH-RefPt_, internal
148,
*Nset, nset=_PickedSet33, internal, generate
   1,  147,    1
*Elset, elset=_PickedSet33, internal, generate
  1,  96,   1
** Section: LARCH
*Shell Section, elset=_PickedSet33, material=RIB/ARCH
68.77, 5
*End Part
**
*Part, name=LFILL
*Node
      1,    542.51001,           0.,   494.829987
      2,   542.169983,           0.,         456.
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*Element, type=C3D8R
  1,   1,  16,   3,   2,  23,  38,  25,  24
  2,  19,  17,  16,  20,  41,  39,  38,  42
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*Node
    243,           0.,           0.,           0.
*Nset, nset=LFILL-RefPt_, internal
243,
*Nset, nset=_PickedSet101, internal, generate
   1,  242,    1
*Elset, elset=_PickedSet101, internal, generate
   1,  140,    1
** Section: FILL
*Solid Section, elset=_PickedSet101, material=GRAVEL
,
*End Part
**
*Part, name=LWEB
*Node
      1,           0.,   737.419983,   411.809082
      2,           0.,   737.419983,   373.448181
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*Element, type=S3
1, 104,  96,  97
2,  83,  87,  82
3, 102, 106,  99
4, 143,   1,   2
5, 151,  64,  63
*Element, type=S4R
  6,  41,  11,   1, 143
  7, 116, 115, 132, 130
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*Node
    156,           0.,           0.,           0.
*Nset, nset=LWEB-RefPt_, internal
156,
*Nset, nset=_PickedSet40, internal, generate
   1,  155,    1
*Elset, elset=_PickedSet40, internal, generate
   1,  125,    1
*Nset, nset=_PickedSet46, internal
  11,  40,  41,  42,  43,  44
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*Elset, elset=_PickedSet46, internal
   6,  22,  33,  43,  50,  60
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*Elset, elset=__PickedSurf45_SPOS, internal, generate
   1,  125,    1
*Surface, type=ELEMENT, name=_PickedSurf45, internal
__PickedSurf45_SPOS, SPOS
*Distribution, name=Ori-1-DiscOrient, location=ELEMENT, Table=Ori-1-DiscOrient_Table
** Description: Distribution generated from Discrete Orientation
,           1.,           0.,           0.,           0.,           1.,           0.
1, 0.0360653512179852, 0.0471531823277473, -0.998236298561096, 0.807162523269653, -0.590327978134155, 0.00127700960729271
2, 0.0450204871594906, 0.0484642647206783, -0.997809827327728, 0.73776787519455, -0.675054371356964, 0.000499753572512418
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125, 0.00559930875897408, 0.0117382081225514, -0.999915361404419, 0.929715037345886, -0.368278533220291, 0.000882906257174909
*Orientation, name=Ori-1, system=RECTANGULAR
Ori-1-DiscOrient
3, 0.
** Section: LWEB
*Shell Section, elset=_PickedSet40, material=WEB, orientation=Ori-1
35., 5
*End Part
**
*Part, name=NARCH
*Node
      1,           0.,   737.419983,  -461.820007
      2,           0.,   737.419983,  -501.394989
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*Element, type=S4R
 1,   1,   2,   7,   6
 2,   2,   3,   8,   7
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*Node
    126,           0.,           0.,           0.
*Nset, nset=NARCH-RefPt_, internal
126,
*Nset, nset=_PickedSet32, internal, generate
   1,  125,    1
*Elset, elset=_PickedSet32, internal, generate
  1,  96,   1
** Section: NARCH
*Shell Section, elset=_PickedSet32, material=NARCH
128.41, 5
*End Part
**
*Part, name=NFILL
*Node
      1,   634.830017,           0.,  -411.420013
      2,   590.169983,           0.,  -411.420013
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*Element, type=C3D8R
  1,  27,  35,  23,  25,  63,  71,  59,  61
  2,  11,   6,  24,  26,  47,  42,  60,  62
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*Node
    397,           0.,           0.,           0.
*Nset, nset=NFILL-RefPt_, internal
397,
*Nset, nset=_PickedSet96, internal, generate
   1,  396,    1
*Elset, elset=_PickedSet96, internal, generate
   1,  240,    1
** Section: FILL
*Solid Section, elset=_PickedSet96, material=GRAVEL
,
*End Part
**
*Part, name=NWEB
*Node
      1,           0.,   737.419983,  -67.6200027
      2,           0.,   737.419983,  -107.040001
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*Element, type=S3
1, 165,  98,  80
2,  29, 149,  28
3,  87,  80,  85
4, 163, 123, 122
5, 117, 114, 115
*Element, type=S4R
  6,  38,  11,   1, 146
  7, 154, 145, 133, 134
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*Node
    166,           0.,           0.,           0.
*Nset, nset=NWEB-RefPt_, internal
166,
*Nset, nset=_PickedSet31, internal, generate
   1,  165,    1
*Elset, elset=_PickedSet31, internal, generate
   1,  135,    1
*Nset, nset=_PickedSet36, internal, generate
 12,  36,   1
*Elset, elset=_PickedSet36, internal
   2,  19,  21,  22,  45,  62
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*Elset, elset=__PickedSurf35_SPOS, internal, generate
   1,  135,    1
*Surface, type=ELEMENT, name=_PickedSurf35, internal
__PickedSurf35_SPOS, SPOS
*Distribution, name=Ori-1-DiscOrient-1, location=ELEMENT, Table=Ori-1-DiscOrient-1_Table
** Description: Distribution generated from Discrete Orientation
,           1.,           0.,           0.,           0.,           1.,           0.
1, -0.0280683152377605, -0.0339971221983433, -0.999027729034424, 0.77880471944809, -0.62726628780365, -0.000535005528945476
2, 0.0124624455347657, 0.00594647508114576, -0.999904632568359, 0.460307210683823, -0.887759566307068, 0.000457556481705979
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135, -0.0335623621940613, -0.0320925824344158, -0.998921275138855, 0.683812916278839, -0.729657292366028, 0.000466712983325124
*Orientation, name=Ori-1, system=RECTANGULAR
Ori-1-DiscOrient-1
3, 0.
** Section: NWEB
*Shell Section, elset=_PickedSet31, material=WEB, orientation=Ori-1
35., 5
*End Part
**
*Part, name=RARCH-merged
*Node
      1,           0.,   737.419983,           0.
      2,   36.5600014,   737.419983,           0.
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*Element, type=S4R
 1,   1,   2,  11, 116
 2, 116,  11,  12, 115
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*Nset, nset=_PickedSet2, internal, generate
   1,  328,    1
*Elset, elset=_PickedSet2, internal, generate
   1,  216,    1
** Section: RARCH
*Shell Section, elset=_PickedSet2, material=RIB/ARCH
68.77, 5
*End Part
**
*Part, name=TARCH-merged
*Node
      1,   634.830017,   737.419983,           0.
      2,   590.169983,   737.419983,           0.
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*Element, type=S4R
 1,   1,   7, 182,  94
 2,   7,   2,   8, 182
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*Nset, nset=_PickedSet2, internal, generate
   1,  267,    1
*Elset, elset=_PickedSet2, internal, generate
   1,  176,    1
** Section: TARCH
*Shell Section, elset=_PickedSet2, material=RIB/ARCH
68.77, 5
*End Part
**
*Part, name=TWEB-merged
*Node
      1,   590.169983,   737.419983,           0.
      2,   36.5600014,   737.419983,           0.
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*Element, type=S3
1, 128, 130, 129
2, 135, 143, 137
3, 212, 170, 171
4, 202, 154, 214
136, 216, 221, 222
137, 225, 317, 316
138, 323, 308, 271
139,  83, 305,  82
*Element, type=S4R
  5, 181,  66,   1,   7
  6, 182, 183, 170, 169
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*Nset, nset=_PickedSet2, internal, generate
   1,  325,    1
*Elset, elset=_PickedSet2, internal, generate
   1,  278,    1
*Nset, nset=_PickedSet7, internal
  1,  5, 67, 68, 69, 70
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*Elset, elset=_PickedSet7, internal
 139, 146, 147, 148, 170, 175
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*Nset, nset=_PickedSet10, internal
  1,  4, 46, 47, 48, 49
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*Elset, elset=_PickedSet10, internal
   5,  29,  30,  54,  55,  56
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*Elset, elset=__PickedSurf6_SPOS, internal, generate
 136,  278,    1
*Surface, type=ELEMENT, name=_PickedSurf6, internal
__PickedSurf6_SPOS, SPOS
*Elset, elset=__PickedSurf9_SPOS, internal, generate
   1,  135,    1
*Surface, type=ELEMENT, name=_PickedSurf9, internal
__PickedSurf9_SPOS, SPOS
*Distribution, name=Ori-2-DiscOrient, location=ELEMENT, Table=Ori-2-DiscOrient_Table
** Description: Distribution generated from Discrete Orientation
,           1.,           0.,           0.,           0.,           1.,           0.
1, -0.998201429843903, 0.0353508405387402, -0.0484167970716953, 0.000489199999719858, -0.802804589271545, -0.596242189407349
2, -0.998825430870056, 0.0323205776512623, -0.0361004620790482, -9.69597240327857e-05, -0.746366143226624, -0.665535569190979
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135, -0.999212503433228, 0.0268211308866739, -0.0292401146143675, 0.00119744183029979, -0.716212511062622, -0.69788134098053
*Orientation, name=Ori-2, system=RECTANGULAR
Ori-2-DiscOrient
3, 0.
** Region: (TWEB:Picked), (Material Orientation:Picked)
*Elset, elset=_I1, internal, generate
   1,  135,    1
** Section: TWEB
*Shell Section, elset=_I1, material=WEB, orientation=Ori-2
35., 5
*Distribution, name=Ori-1-DiscOrient-2, location=ELEMENT, Table=Ori-1-DiscOrient-2_Table
** Description: Distribution generated from Discrete Orientation
,           1.,           0.,           0.,           0.,           1.,           0.
136, 0.999364018440247, -0.0146481655538082, -0.0325114503502846, 0.000257200852502137, -0.908747613430023, 0.417345941066742
137, 0.998888552188873, -0.0218855515122414, -0.0417471826076508, 0.000713922723662108, -0.878548502922058, 0.47765251994133
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278, 0.999332785606384, -0.0268119592219591, -0.0248004663735628, -0.00038406637031585, -0.686710178852081, 0.726931273937225
*Orientation, name=Ori-1, system=RECTANGULAR
Ori-1-DiscOrient-2
3, 0.
** Region: (TWEB:Picked), (Material Orientation:Picked)
*Elset, elset=_I2, internal, generate
 136,  278,    1
** Section: TWEB
*Shell Section, elset=_I2, material=WEB, orientation=Ori-1
35., 5
*End Part
**
**
** ASSEMBLY
**
*Assembly, name=Assembly
**
*Instance, name=LARCH-1, part=LARCH
*End Instance
**
*Instance, name=LWEB-1, part=LWEB
*End Instance
**
*Instance, name=NARCH-1, part=NARCH
*End Instance
**
*Instance, name=NWEB-1, part=NWEB
*End Instance
**
*Instance, name=TWEB-merged-1, part=TWEB-merged
*End Instance
**
*Instance, name=TARCH-merged-1, part=TARCH-merged
*End Instance
**
*Instance, name=RARCH-merged-1, part=RARCH-merged
*End Instance
**
*Instance, name=LFILL-1, part=LFILL
*End Instance
**
*Instance, name=NFILL-1, part=NFILL
*End Instance
**
*Nset, nset=_PickedSet32, internal, instance=LARCH-1, generate
   3,  147,    3
*Elset, elset=_PickedSet32, internal, instance=LARCH-1, generate
  2,  96,   2
*Nset, nset=_PickedSet33, internal, instance=LWEB-1
  11,  40,  41,  42,  43,  44
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*Elset, elset=_PickedSet33, internal, instance=LWEB-1
   6,  22,  33,  43,  50,  60
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*Nset, nset=_PickedSet34, internal, instance=RARCH-merged-1
   9,  10, 276, 277, 278, 279
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*Elset, elset=_PickedSet34, internal, instance=RARCH-merged-1, generate
 163,  216,    1
*Nset, nset=_PickedSet35, internal, instance=LWEB-1, generate
 12,  39,   1
*Elset, elset=_PickedSet35, internal, instance=LWEB-1
  16,  17,  18,  29,  30,  35
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*Nset, nset=_PickedSet36, internal, instance=RARCH-merged-1
   2,   3,   8,  11,  12,  13
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*Elset, elset=_PickedSet36, internal, instance=RARCH-merged-1
   1,   2,   3,   4,   5,   6
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*Nset, nset=_PickedSet37, internal, instance=TWEB-merged-1
   2,   3,   6,  20,  21,  22
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*Elset, elset=_PickedSet37, internal, instance=TWEB-merged-1
  17,  19,  20,  21,  22,  23
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*Nset, nset=_PickedSet38, internal, instance=TARCH-merged-1
   2,   3,   6,   8,   9,  10
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*Elset, elset=_PickedSet38, internal, instance=TARCH-merged-1
   2,   4,   6,   8,  10,  12
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*Nset, nset=_PickedSet39, internal, instance=TWEB-merged-1
  1,  4,  5, 46, 47, 48
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*Elset, elset=_PickedSet39, internal, instance=TWEB-merged-1
   5,  29,  30,  54,  55,  56
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*Nset, nset=_PickedSet40, internal, instance=RARCH-merged-1
   5,   6, 117, 118, 119, 120
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*Elset, elset=_PickedSet40, internal, instance=RARCH-merged-1, generate
  55,  108,    1
*Nset, nset=_PickedSet41, internal, instance=NWEB-1
  11,  37,  38,  39,  40,  41
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*Elset, elset=_PickedSet41, internal, instance=NWEB-1
   6,   8,   9,  10,  13,  24
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*Nset, nset=_PickedSet42, internal, instance=NARCH-1, generate
   1,  121,    5
*Elset, elset=_PickedSet42, internal, instance=NARCH-1, generate
  1,  93,   4
*Nset, nset=_PickedSet43, internal, instance=NWEB-1, generate
 12,  36,   1
*Elset, elset=_PickedSet43, internal, instance=NWEB-1
   2,  19,  21,  22,  45,  62
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*Nset, nset=_PickedSet44, internal, instance=LARCH-1, generate
 145,  147,    1
*Nset, nset=_PickedSet44, internal, instance=LWEB-1
 39, 40
*Nset, nset=_PickedSet44, internal, instance=NWEB-1
 36, 37
*Nset, nset=_PickedSet44, internal, instance=TARCH-merged-1
   3,   4,   5,   6,  51, 138
*Nset, nset=_PickedSet44, internal, instance=NARCH-1, generate
 121,  125,    1
*Nset, nset=_PickedSet44, internal, instance=TWEB-merged-1, generate
 3,  6,  1
*Nset, nset=_PickedSet44, internal, instance=RARCH-merged-1
  3,  4,  6,  7,  8, 10
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*Nset, nset=_PickedSet45, internal, instance=LARCH-1, generate
 1,  3,  1
*Nset, nset=_PickedSet45, internal, instance=LWEB-1, generate
  1,  12,   1
*Nset, nset=_PickedSet45, internal, instance=NWEB-1, generate
  1,  12,   1
*Nset, nset=_PickedSet45, internal, instance=NARCH-1, generate
 1,  5,  1
*Nset, nset=_PickedSet45, internal, instance=RARCH-merged-1, generate
 1,  9,  4
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*Nset, nset=_PickedSet46, internal, instance=LARCH-1, generate
   1,  145,    3
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*Elset, elset=_PickedSet47, internal, instance=LARCH-1, generate
  1,  96,   1
*Elset, elset=_PickedSet47, internal, instance=LWEB-1, generate
   1,  125,    1
*Elset, elset=_PickedSet47, internal, instance=NWEB-1, generate
   1,  135,    1
*Elset, elset=_PickedSet47, internal, instance=TARCH-merged-1, generate
   1,  176,    1
*Elset, elset=_PickedSet47, internal, instance=NARCH-1, generate
  1,  96,   1
*Elset, elset=_PickedSet47, internal, instance=TWEB-merged-1, generate
   1,  278,    1
*Elset, elset=_PickedSet47, internal, instance=RARCH-merged-1, generate
   1,  216,    1
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*Elset, elset=_PickedSet62, internal, instance=LFILL-1, generate
   1,  140,    1
*Elset, elset=_PickedSet62, internal, instance=NFILL-1, generate
   1,  240,    1
*Nset, nset=_PickedSet63, internal, instance=LFILL-1
   1,   2,   3,   4,   5,   6
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*Nset, nset=_PickedSet63, internal, instance=NFILL-1
   1,   2,   3,   4,   5,   6
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*Elset, elset=_PickedSet64, internal, instance=LWEB-1, generate
   1,  125,    1
*Elset, elset=_PickedSet64, internal, instance=NWEB-1, generate
   1,  135,    1
*Elset, elset=_PickedSet64, internal, instance=TWEB-merged-1, generate
   1,  278,    1
*Elset, elset=__PickedSurf59_SNEG, internal, instance=LARCH-1, generate
  1,  96,   1
*Elset, elset=__PickedSurf59_SNEG, internal, instance=LWEB-1, generate
   1,  125,    1
*Elset, elset=__PickedSurf59_SNEG, internal, instance=NWEB-1, generate
   1,  135,    1
*Elset, elset=__PickedSurf59_SNEG, internal, instance=TARCH-merged-1, generate
   1,  176,    1
*Elset, elset=__PickedSurf59_SNEG, internal, instance=NARCH-1, generate
  1,  96,   1
*Elset, elset=__PickedSurf59_SNEG, internal, instance=TWEB-merged-1, generate
   1,  278,    1
*Elset, elset=__PickedSurf59_SPOS, internal, instance=RARCH-merged-1, generate
   1,  216,    1
*Surface, type=ELEMENT, name=_PickedSurf59, internal
__PickedSurf59_SNEG, SNEG
__PickedSurf59_SPOS, SPOS
*Elset, elset=__PickedSurf60_S6, internal, instance=LFILL-1
   1,   6,  15,  20,  29,  34
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*Elset, elset=__PickedSurf60_S6, internal, instance=NFILL-1
   6,  12,  17,  22,  30,  36
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*Elset, elset=__PickedSurf60_S5, internal, instance=LFILL-1
   1,  10,  15,  24,  29,  38
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*Elset, elset=__PickedSurf60_S5, internal, instance=NFILL-1
   9,  22,  33,  46,  57,  70
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*Elset, elset=__PickedSurf60_S3, internal, instance=LFILL-1
   4,   8,  11,  18,  22,  25
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*Elset, elset=__PickedSurf60_S3, internal, instance=NFILL-1
   2,   4,  23,  26,  28,  47
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*Elset, elset=__PickedSurf60_S4, internal, instance=LFILL-1, generate
   5,  131,   14
*Elset, elset=__PickedSurf60_S4, internal, instance=NFILL-1
  13,  15,  23,  37,  39,  47
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*Surface, type=ELEMENT, name=_PickedSurf60, internal
__PickedSurf60_S6, S6
__PickedSurf60_S5, S5
__PickedSurf60_S4, S4
__PickedSurf60_S3, S3
*Surface, type=NODE, name=_PickedSet32_CNS_, internal
_PickedSet32, 1.
*Surface, type=NODE, name=_PickedSet33_CNS_, internal
_PickedSet33, 1.
*Surface, type=NODE, name=_PickedSet42_CNS_, internal
_PickedSet42, 1.
*Surface, type=NODE, name=_PickedSet43_CNS_, internal
_PickedSet43, 1.
*Surface, type=NODE, name=_PickedSet34_CNS_, internal
_PickedSet34, 1.
*Surface, type=NODE, name=_PickedSet35_CNS_, internal
_PickedSet35, 1.
*Surface, type=NODE, name=_PickedSet40_CNS_, internal
_PickedSet40, 1.
*Surface, type=NODE, name=_PickedSet41_CNS_, internal
_PickedSet41, 1.
*Surface, type=NODE, name=_PickedSet36_CNS_, internal
_PickedSet36, 1.
*Surface, type=NODE, name=_PickedSet37_CNS_, internal
_PickedSet37, 1.
*Surface, type=NODE, name=_PickedSet38_CNS_, internal
_PickedSet38, 1.
*Surface, type=NODE, name=_PickedSet39_CNS_, internal
_PickedSet39, 1.
** Constraint: LARCH-LWEB
*Tie, name=LARCH-LWEB, adjust=yes, no rotation
_PickedSet33_CNS_, _PickedSet32_CNS_
** Constraint: LTR-FILL
*Tie, name=LTR-FILL, adjust=yes
_PickedSurf60, _PickedSurf59
** Constraint: NARCH-NWEB
*Tie, name=NARCH-NWEB, adjust=yes, no rotation
_PickedSet43_CNS_, _PickedSet42_CNS_
** Constraint: RARCH-LWEB
*Tie, name=RARCH-LWEB, adjust=yes, no rotation
_PickedSet35_CNS_, _PickedSet34_CNS_
** Constraint: RARCH-NWEB
*Tie, name=RARCH-NWEB, adjust=yes, no rotation
_PickedSet41_CNS_, _PickedSet40_CNS_
** Constraint: RARCH-TWEB
*Tie, name=RARCH-TWEB, adjust=yes, no rotation
_PickedSet37_CNS_, _PickedSet36_CNS_
** Constraint: TARCH-TWEB
*Tie, name=TARCH-TWEB, adjust=yes, no rotation
_PickedSet39_CNS_, _PickedSet38_CNS_
*End Assembly
*Distribution Table, name=Ori-1-DiscOrient_Table
coord3D, coord3D
*Distribution Table, name=Ori-1-DiscOrient-1_Table
coord3D, coord3D
*Distribution Table, name=Ori-2-DiscOrient_Table
coord3D, coord3D
*Distribution Table, name=Ori-1-DiscOrient-2_Table
coord3D, coord3D
**
** MATERIALS
**
*Material, name=GRAVEL
*Density
 8.564e-06,
*Elastic
500., 0.2
*Material, name=NARCH
*Elastic
425., 0.2
*Material, name=RIB/ARCH
*Elastic
500., 0.2
*Material, name=WEB
*Elastic, type=LAMINA
5250.,   840.,    0.3, 470.27, 470.27, 470.27
**
** INTERACTION PROPERTIES
**
*Surface Interaction, name=GenInt
1.,
*Friction, slip tolerance=0.005
 0.7,
*Surface Behavior, pressure-overclosure=HARD
**
** BOUNDARY CONDITIONS
**
** Name: BaseSup Type: Symmetry/Antisymmetry/Encastre
*Boundary
_PickedSet44, PINNED
** Name: FillSup Type: Symmetry/Antisymmetry/Encastre
*Boundary
_PickedSet63, PINNED
** Name: VaultSymm Type: Symmetry/Antisymmetry/Encastre
*Boundary
_PickedSet45, XSYMM
** Name: WallSup Type: Symmetry/Antisymmetry/Encastre
*Boundary
_PickedSet46, ENCASTRE
**
** INTERACTIONS
**
** Interaction: GenInt
*Contact
*Contact Inclusions, ALL EXTERIOR
*Contact Property Assignment
 ,  , GenInt
** ----------------------------------------------------------------
**
** STEP: STATIC
**
*Step, name=STATIC, nlgeom=NO
*Static
0.001, 1., 1e-08, 1.
**
** LOADS
**
** Name: DEAD   Type: Body force
*Dload
_PickedSet64, BY, -5.5e-05
** Name: FillSW   Type: Gravity
*Dload
_PickedSet62, GRAV, 1., 0., -1., 0.
** Name: SW   Type: Body force
*Dload
_PickedSet47, BY, -5.4e-05
**
** OUTPUT REQUESTS
**
*Restart, write, frequency=0
**
** FIELD OUTPUT: F-Output-1
**
*Output, field, variable=PRESELECT
**
** HISTORY OUTPUT: H-Output-1
**
*Output, history, variable=PRESELECT
*End Step
