*Heading
** Job name: Analysis-ShellSolid-upprop Model name: Shell-Solid
** Generated by: Abaqus/CAE 2019
*Preprint, echo=NO, model=NO, history=NO, contact=NO
**
** PARTS
**
*Part, name=LARCH
*Node
      1,           0.,         780.,          10.
      2,           0.,         760.,          10.
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*Element, type=C3D8R
  1,   4,   3,   1,   2,  16,  15,  13,  14
  2,   8,   7,   6,  11,  20,  19,  18,  23
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*Node
    277,           0.,           0.,           0.
*Nset, nset=LARCH-RefPt_, internal
277,
*Nset, nset=_PickedSet46, internal, generate
   1,  276,    1
*Elset, elset=_PickedSet46, internal, generate
   1,  132,    1
** Section: RIB-ARCH
*Solid Section, elset=_PickedSet46, material=RIB-ARCH
,
*End Part
**
*Part, name=LFILL
*Node
      1,        637.5,           0.,        428.5
      2,        637.5,           0.,        497.5
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*Element, type=C3D8R
  1,  76, 387, 599, 363,   1,  58, 359,  63
  2, 387,  88, 375, 599,  58,   2,  59, 359
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*Node
    625,           0.,           0.,           0.
*Nset, nset=LFILL-RefPt_, internal
625,
*Nset, nset=_PickedSet67, internal, generate
   1,  624,    1
*Elset, elset=_PickedSet67, internal, generate
   1,  345,    1
** Section: FILL
*Solid Section, elset=_PickedSet67, material=FILL
,
*End Part
**
*Part, name=LWEB
*Node
      1,   497.767059,         295.,   432.138855
      2,   504.852081,         295.,   401.980835
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*Element, type=S3
1,  86,  93,  92
2, 111, 113, 112
3, 118,  94, 102
4,  80,  88,  87
*Element, type=S4R
  5,  48, 117,  52,  47
  6, 117,  17,  16,  53
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*Node
    146,           0.,           0.,           0.
*Nset, nset=LWEB-RefPt_, internal
146,
*Nset, nset=_PickedSet31, internal, generate
   1,  145,    1
*Elset, elset=_PickedSet31, internal, generate
   1,  121,    1
*Nset, nset=_PickedSet36, internal, generate
  3,  20,   1
*Elset, elset=_PickedSet36, internal
  6,  8,  9, 11, 13, 30
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*Elset, elset=__PickedSurf35_SPOS, internal, generate
   1,  121,    1
*Surface, type=ELEMENT, name=_PickedSurf35, internal
__PickedSurf35_SPOS, SPOS
*Distribution, name=Ori-1-DiscOrient-1, location=ELEMENT, Table=Ori-1-DiscOrient-1_Table
** Description: Distribution generated from Discrete Orientation
,           1.,           0.,           0.,           0.,           1.,           0.
1, 0.0238699074834585, 0.0389984250068665, -0.998954057693481, 0.876302242279053, -0.481756955385208, 0.00213172216899693
2, 0.00979292578995228, 0.0211518798023462, -0.999728322029114, 0.909711420536041, -0.415241122245789, 0.000125641046906821
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121, 0.0311314705759287, 0.0425367616117001, -0.998609781265259, 0.824297845363617, -0.566154301166534, 0.00158142973668873
*Orientation, name=Ori-1, system=RECTANGULAR
Ori-1-DiscOrient-1
3, 0.
** Section: WEB
*Shell Section, elset=_PickedSet31, material=WEB, orientation=Ori-1, offset=SPOS
35., 5
*End Part
**
*Part, name=NARCH
*Node
      1,       610.25,           0.,  -481.970001
      2,       443.25,           0.,  -481.970001
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*Element, type=C3D8R
  1,  17,  25,  27,  20,  44,  52,  54,  47
  2,  23,  16,  15,  19,  50,  43,  42,  46
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*Node
    649,           0.,           0.,           0.
*Nset, nset=NARCH-RefPt_, internal
649,
*Nset, nset=_PickedSet37, internal, generate
   1,  648,    1
*Elset, elset=_PickedSet37, internal, generate
   1,  414,    1
** Section: NARCH
*Solid Section, elset=_PickedSet37, material=NARCH
,
*End Part
**
*Part, name=NFILL
*Node
      1,        637.5,         295.,  -646.969971
      2,   538.859985,         295.,  -646.969971
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*Element, type=C3D8R
  1,  45,  40,  32,  31, 111, 106,  98,  97
  2,  53,  61,  63,  66, 119, 127, 129, 132
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*Node
    727,           0.,           0.,           0.
*Nset, nset=NFILL-RefPt_, internal
727,
*Nset, nset=_PickedSet81, internal, generate
   1,  726,    1
*Elset, elset=_PickedSet81, internal, generate
   1,  490,    1
** Section: FILL
*Solid Section, elset=_PickedSet81, material=FILL
,
*End Part
**
*Part, name=NWEB
*Node
      1,   503.199768,         295.,  -441.974518
      2,   501.587189,         295.,  -481.970001
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*Element, type=S3
1,  69,  74,  73
2,  55,  53,  54
3, 152,  68,  67
4, 162,  75,  70
5,  92,  86,  93
6,  58,  19,  63
7, 142, 107, 106
8, 159,  66, 156
*Element, type=S4R
  9,   1,  53,  52,   2
 10,   3,  22,  53,   1
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*Node
    167,           0.,           0.,           0.
*Nset, nset=NWEB-RefPt_, internal
167,
*Nset, nset=_PickedSet31, internal, generate
   1,  166,    1
*Elset, elset=_PickedSet31, internal, generate
   1,  143,    1
*Nset, nset=_PickedSet36, internal
  2, 35, 36, 37, 38, 39
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*Elset, elset=_PickedSet36, internal
   9,  13,  17,  22,  23,  42
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*Elset, elset=__PickedSurf35_SPOS, internal, generate
   1,  143,    1
*Surface, type=ELEMENT, name=_PickedSurf35, internal
__PickedSurf35_SPOS, SPOS
*Distribution, name=Ori-1-DiscOrient, location=ELEMENT, Table=Ori-1-DiscOrient_Table
** Description: Distribution generated from Discrete Orientation
,           1.,           0.,           0.,           0.,           1.,           0.
1, -0.0401320829987526, -0.042523056268692, -0.998289167881012, 0.721478700637817, -0.692436456680298, 0.00049090915126726
2, -0.0377225019037724, -0.0207532551139593, -0.999072730541229, 0.459146022796631, -0.88836008310318, 0.00111726264003664
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143, -0.0138620585203171, -0.0280749704688787, -0.999509692192078, 0.916713535785675, -0.399542421102524, -0.00149112462531775
*Orientation, name=Ori-1, system=RECTANGULAR
Ori-1-DiscOrient
3, 0.
** Section: WEB
*Shell Section, elset=_PickedSet31, material=WEB, orientation=Ori-1, offset=SPOS
35., 5
*End Part
**
*Part, name=RARCH-merged
*Node
      1,           0.,         780.,           0.
      2,           0.,         700.,           0.
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*Element, type=C3D8R
  1,   7,   1,  42,   6,  70,  71, 679, 122
  2,   4,   5, 676,   3, 174, 148, 846, 200
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*Nset, nset=_PickedSet4, internal, generate
    1,  1052,     1
*Elset, elset=_PickedSet4, internal, generate
   1,  648,    1
** Section: RIB-ARCH
*Solid Section, elset=_PickedSet4, material=RIB-ARCH
,
*End Part
**
*Part, name=TARCH-merged
*Node
      1,        602.5,         780.,           0.
      2,        622.5,         780.,           0.
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*Element, type=C3D8R
  1,   3,   2,   1,  10, 145, 164,  49,  50
  2,   7,   6,   5, 411,  87,  88, 107, 417
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*Nset, nset=_PickedSet3, internal, generate
   1,  492,    1
*Elset, elset=_PickedSet3, internal, generate
   1,  240,    1
** Section: RIB-ARCH
*Solid Section, elset=_PickedSet3, material=RIB-ARCH
,
*End Part
**
*Part, name=TWEB-merged
*Node
      1,   517.061035,         295.,  -386.141266
      2,        602.5,         295.,  -379.591278
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*Element, type=S3
1, 111, 117, 114
2, 120, 121, 116
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*Element, type=S4R
  5,  89,  54,   1,   7
  6,   9,  10,  92,  90
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*Nset, nset=_PickedSet3, internal, generate
   1,  309,    1
*Elset, elset=_PickedSet3, internal, generate
   1,  276,    1
*Nset, nset=_PickedSet7, internal
  3,  5, 75, 76, 77, 78, 79, 80, 81, 82, 83, 84, 85, 86, 87, 88
*Elset, elset=_PickedSet7, internal
 147, 192, 193, 222, 223, 226, 231, 232, 236, 239, 243, 245, 246, 248, 264
*Nset, nset=_PickedSet10, internal
  2,  3,  8,  9, 10, 11, 12, 13, 14, 15, 16, 17, 18, 19, 20, 21
*Elset, elset=_PickedSet10, internal
  6,  8,  9, 10, 11, 12, 13, 14, 15, 17, 39, 40, 41, 42, 43
*Elset, elset=__PickedSurf6_SPOS, internal, generate
 138,  276,    1
*Surface, type=ELEMENT, name=_PickedSurf6, internal
__PickedSurf6_SPOS, SPOS
*Elset, elset=__PickedSurf9_SPOS, internal, generate
   1,  137,    1
*Surface, type=ELEMENT, name=_PickedSurf9, internal
__PickedSurf9_SPOS, SPOS
*Distribution, name=Ori-2-DiscOrient, location=ELEMENT, Table=Ori-2-DiscOrient_Table
** Description: Distribution generated from Discrete Orientation
,           1.,           0.,           0.,           0.,           1.,           0.
1, -0.996435642242432, 0.0533012337982655, -0.0653849244117737, 0.00021981839381624, -0.773448824882507, -0.633858799934387
2, -0.998055875301361, 0.0412646643817425, -0.0467102341353893, 4.83371986774728e-05, -0.748929023742676, -0.662650287151337
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137, -0.997801423072815, 0.0474515855312347, -0.0462685525417328, 0.00316993612796068, -0.663156747817993, -0.748473882675171
*Orientation, name=Ori-2, system=RECTANGULAR
Ori-2-DiscOrient
3, 0.
** Region: (WEB:Picked), (Material Orientation:Picked)
*Elset, elset=_I1, internal, generate
   1,  137,    1
** Section: WEB
*Shell Section, elset=_I1, material=WEB, orientation=Ori-2, offset=SPOS
35., 5
*Distribution, name=Ori-1-DiscOrient-2, location=ELEMENT, Table=Ori-1-DiscOrient-2_Table
** Description: Distribution generated from Discrete Orientation
,           1.,           0.,           0.,           0.,           1.,           0.
138, 0.999403476715088, -0.0270350947976112, -0.0214885044842958, 0.00193252693861723, -0.577472150325775, 0.816408097743988
139, 0.998745858669281, -0.0359200946986675, -0.0348778404295444, 0.0019150284351781, -0.668704807758331, 0.743525505065918
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276, 0.99879002571106, -0.0392386987805367, -0.0296424180269241, 0.00190380401909351, -0.571469008922577, 0.820621430873871
*Orientation, name=Ori-1, system=RECTANGULAR
Ori-1-DiscOrient-2
3, 0.
** Region: (WEB:Picked), (Material Orientation:Picked)
*Elset, elset=_I2, internal, generate
 138,  276,    1
** Section: WEB
*Shell Section, elset=_I2, material=WEB, orientation=Ori-1, offset=SPOS
35., 5
*End Part
**
**
** ASSEMBLY
**
*Assembly, name=Assembly
**
*Instance, name=LARCH-1, part=LARCH
          0.,           0.,        472.5
*End Instance
**
*Instance, name=NARCH-1, part=NARCH
*End Instance
**
*Instance, name=NWEB-1, part=NWEB
*End Instance
**
*Instance, name=LWEB-1, part=LWEB
*End Instance
**
*Instance, name=TWEB-merged-1, part=TWEB-merged
*End Instance
**
*Instance, name=TARCH-merged-1, part=TARCH-merged
*End Instance
**
*Instance, name=RARCH-merged-2, part=RARCH-merged
*End Instance
**
*Instance, name=LFILL-1, part=LFILL
*End Instance
**
*Instance, name=NFILL-1, part=NFILL
*End Instance
**
*Nset, nset=_PickedSet72, internal, instance=LARCH-1, generate
  1,  12,   1
*Nset, nset=_PickedSet72, internal, instance=NARCH-1, generate
 622,  648,    1
*Nset, nset=_PickedSet72, internal, instance=LWEB-1, generate
 20,  31,   1
*Nset, nset=_PickedSet72, internal, instance=NWEB-1, generate
 23,  35,   1
*Nset, nset=_PickedSet72, internal, instance=RARCH-merged-2
   1,   2,  22,  23,  24,  25
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*Elset, elset=_PickedSet72, internal, instance=LARCH-1, generate
 1,  6,  1
*Elset, elset=_PickedSet72, internal, instance=NARCH-1, generate
 397,  414,    1
*Elset, elset=_PickedSet72, internal, instance=LWEB-1
  28,  57,  58,  59,  64,  76, 111, 113, 114, 115, 117
*Elset, elset=_PickedSet72, internal, instance=NWEB-1
  41,  46,  48,  59,  61,  68,  72,  73,  74, 131, 133, 137
*Elset, elset=_PickedSet72, internal, instance=RARCH-merged-2
 325, 326, 327, 328, 329, 330, 487, 488, 489, 490, 491, 492
*Nset, nset=_PickedSet110, internal, instance=LARCH-1
   1,   2,   8,   9,  10,  13
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*Elset, elset=_PickedSet110, internal, instance=LARCH-1
   1,   3,   6,   7,   9,  12
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*Nset, nset=_PickedSet124, internal, instance=LWEB-1, generate
 1,  3,  1
*Nset, nset=_PickedSet124, internal, instance=TWEB-merged-1
  5,  6, 55
*Elset, elset=_PickedSet124, internal, instance=LWEB-1
 10, 11
*Elset, elset=_PickedSet124, internal, instance=TWEB-merged-1
 148, 248
*Nset, nset=_PickedSet134, internal, instance=NWEB-1, generate
 1,  3,  1
*Nset, nset=_PickedSet134, internal, instance=TWEB-merged-1
 1, 2, 7
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*Elset, elset=_PickedSet137, internal, instance=LFILL-1, generate
   1,  345,    1
*Elset, elset=_PickedSet137, internal, instance=NFILL-1, generate
   1,  490,    1
*Nset, nset=_PickedSet138, internal, instance=NARCH-1, generate
  1,  27,   1
*Nset, nset=_PickedSet138, internal, instance=NFILL-1, generate
 661,  726,    1
*Nset, nset=_PickedSet138, internal, instance=LFILL-1
   1,   2,   3,   4,   9,  10
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*Nset, nset=_PickedSet140, internal, instance=LFILL-1
   1,   2,   3,   5,   6,   7
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*Nset, nset=_PickedSet140, internal, instance=NFILL-1
   1,   2,  11,  12,  13,  24
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*Elset, elset=_PickedSet141, internal, instance=LARCH-1, generate
   1,  132,    1
*Elset, elset=_PickedSet141, internal, instance=NARCH-1, generate
   1,  414,    1
*Elset, elset=_PickedSet141, internal, instance=TARCH-merged-1, generate
   1,  240,    1
*Elset, elset=_PickedSet141, internal, instance=RARCH-merged-2, generate
   1,  648,    1
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*Elset, elset=_PickedSet142, internal, instance=NWEB-1, generate
   1,  143,    1
*Elset, elset=_PickedSet142, internal, instance=LWEB-1, generate
   1,  121,    1
*Elset, elset=_PickedSet142, internal, instance=TWEB-merged-1, generate
   1,  276,    1
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*Elset, elset=_PickedSet143, internal, instance=NWEB-1, generate
   1,  143,    1
*Elset, elset=_PickedSet143, internal, instance=LWEB-1, generate
   1,  121,    1
*Elset, elset=_PickedSet143, internal, instance=TWEB-merged-1, generate
   1,  276,    1
*Elset, elset=__PickedSurf84_S4, internal, instance=TARCH-merged-1, generate
 126,  240,    6
*Elset, elset=__PickedSurf84_S5, internal, instance=TARCH-merged-1, generate
   6,  120,    6
*Elset, elset=__PickedSurf84_S6, internal, instance=RARCH-merged-2, generate
 166,  322,    6
*Elset, elset=__PickedSurf84_S3, internal, instance=RARCH-merged-2, generate
   4,  160,    6
*Surface, type=ELEMENT, name=_PickedSurf84, internal
__PickedSurf84_S4, S4
__PickedSurf84_S5, S5
__PickedSurf84_S6, S6
__PickedSurf84_S3, S3
*Elset, elset=__PickedSurf85_SNEG, internal, instance=TWEB-merged-1, generate
   1,  276,    1
*Surface, type=ELEMENT, name=_PickedSurf85, internal
__PickedSurf85_SNEG, SNEG
*Elset, elset=__PickedSurf86_S5, internal, instance=NARCH-1
  10,  18,  28,  36,  46,  54
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*Elset, elset=__PickedSurf86_S3, internal, instance=NARCH-1, generate
  12,  408,   18
*Elset, elset=__PickedSurf86_S6, internal, instance=NARCH-1, generate
  14,  410,   18
*Elset, elset=__PickedSurf86_S4, internal, instance=RARCH-merged-2, generate
 329,  485,    6
*Surface, type=ELEMENT, name=_PickedSurf86, internal
__PickedSurf86_S5, S5
__PickedSurf86_S3, S3
__PickedSurf86_S6, S6
__PickedSurf86_S4, S4
*Elset, elset=__PickedSurf113_S6, internal, instance=LARCH-1, generate
   4,  130,    6
*Elset, elset=__PickedSurf113_S3, internal, instance=RARCH-merged-2, generate
 492,  648,    6
*Surface, type=ELEMENT, name=_PickedSurf113, internal
__PickedSurf113_S6, S6
__PickedSurf113_S3, S3
*Elset, elset=__PickedSurf114_SNEG, internal, instance=LWEB-1, generate
   1,  121,    1
*Surface, type=ELEMENT, name=_PickedSurf114, internal
__PickedSurf114_SNEG, SNEG
*Elset, elset=__PickedSurf121_S4, internal, instance=LFILL-1, generate
 169,  209,    8
*Elset, elset=__PickedSurf121_S3, internal, instance=LFILL-1
 210, 218
*Elset, elset=__PickedSurf121_S2, internal, instance=LFILL-1
 226, 227, 228, 250, 258, 266, 267, 268, 269, 298, 299, 300, 301, 330, 338
*Surface, type=ELEMENT, name=_PickedSurf121, internal
__PickedSurf121_S4, S4
__PickedSurf121_S3, S3
__PickedSurf121_S2, S2
*Elset, elset=__PickedSurf122_S2, internal, instance=LARCH-1, generate
 127,  132,    1
*Elset, elset=__PickedSurf122_S2, internal, instance=TARCH-merged-1, generate
 115,  120,    1
*Elset, elset=__PickedSurf122_S2, internal, instance=RARCH-merged-2
 157, 158, 159, 160, 161, 162, 643, 644, 645, 646, 647, 648
*Surface, type=ELEMENT, name=_PickedSurf122, internal
__PickedSurf122_S2, S2
*Elset, elset=__PickedSurf123_S4, internal, instance=LFILL-1, generate
 169,  209,    8
*Elset, elset=__PickedSurf123_S3, internal, instance=LFILL-1
 210, 218
*Elset, elset=__PickedSurf123_S2, internal, instance=LFILL-1
 226, 227, 228, 250, 258, 266, 267, 268, 269, 298, 299, 300, 301, 330, 338
*Surface, type=ELEMENT, name=_PickedSurf123, internal
__PickedSurf123_S4, S4
__PickedSurf123_S3, S3
__PickedSurf123_S2, S2
*Elset, elset=__PickedSurf130_SNEG, internal, instance=NWEB-1, generate
   1,  143,    1
*Surface, type=ELEMENT, name=_PickedSurf130, internal
__PickedSurf130_SNEG, SNEG
*Elset, elset=__PickedSurf131_S1, internal, instance=NFILL-1, generate
  1,  49,   1
*Surface, type=ELEMENT, name=_PickedSurf131, internal
__PickedSurf131_S1, S1
*Elset, elset=__PickedSurf132_S2, internal, instance=TARCH-merged-1, generate
 235,  240,    1
*Elset, elset=__PickedSurf132_S2, internal, instance=RARCH-merged-2
 319, 320, 321, 322, 323, 324, 481, 482, 483, 484, 485, 486
*Surface, type=ELEMENT, name=_PickedSurf132, internal
__PickedSurf132_S2, S2
*Elset, elset=__PickedSurf133_S1, internal, instance=NFILL-1, generate
  1,  49,   1
*Surface, type=ELEMENT, name=_PickedSurf133, internal
__PickedSurf133_S1, S1
*Elset, elset=__PickedSurf135_S3, internal, instance=NFILL-1, generate
   9,  450,   49
*Elset, elset=__PickedSurf135_S4, internal, instance=NFILL-1
  10,  22,  25,  59,  71,  74
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*Elset, elset=__PickedSurf135_S6, internal, instance=NFILL-1
   6,  12,  18,  55,  61,  67
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*Elset, elset=__PickedSurf135_S5, internal, instance=NFILL-1, generate
  26,  467,   49
*Surface, type=ELEMENT, name=_PickedSurf135, internal
__PickedSurf135_S3, S3
__PickedSurf135_S4, S4
__PickedSurf135_S6, S6
__PickedSurf135_S5, S5
*Elset, elset=__PickedSurf136_S5, internal, instance=NARCH-1
  10,  18,  28,  36,  46,  54
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*Elset, elset=__PickedSurf136_S3, internal, instance=NARCH-1, generate
  12,  408,   18
*Elset, elset=__PickedSurf136_S6, internal, instance=NARCH-1
  10,  14,  28,  32,  46,  50
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*Elset, elset=__PickedSurf136_S4, internal, instance=NARCH-1
   2,   7,   8,  20,  25,  26
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*Surface, type=ELEMENT, name=_PickedSurf136, internal
__PickedSurf136_S5, S5
__PickedSurf136_S3, S3
__PickedSurf136_S6, S6
__PickedSurf136_S4, S4
*Surface, type=NODE, name=_PickedSet124_CNS_, internal
_PickedSet124, 1.
*Surface, type=NODE, name=_PickedSet134_CNS_, internal
_PickedSet134, 1.
** Constraint: LARCH-RARCH-LWEB
*Tie, name=LARCH-RARCH-LWEB, adjust=yes, no rotation
_PickedSurf114, _PickedSurf113
** Constraint: LARCH-RARCH-TARCH-LFILL
*Tie, name=LARCH-RARCH-TARCH-LFILL, adjust=yes
_PickedSurf122, _PickedSurf121
** Constraint: LWEB-TWEB-LFILL
*Tie, name=LWEB-TWEB-LFILL, adjust=yes, no rotation
_PickedSet124_CNS_, _PickedSurf123
** Constraint: NARCH-NFILL
*Tie, name=NARCH-NFILL, adjust=yes
_PickedSurf136, _PickedSurf135
** Constraint: RARCH-NARCH-NWEB
*Tie, name=RARCH-NARCH-NWEB, adjust=yes, no rotation
_PickedSurf130, _PickedSurf86
** Constraint: RARCH-TARCH-TWEB
*Tie, name=RARCH-TARCH-TWEB, adjust=yes, no rotation
_PickedSurf85, _PickedSurf84
** Constraint: TARCH-RARCH-NFILL
*Tie, name=TARCH-RARCH-NFILL, adjust=yes
_PickedSurf132, _PickedSurf131
** Constraint: TWEB-NWEB-NFILL
*Tie, name=TWEB-NWEB-NFILL, adjust=yes, no rotation
_PickedSet134_CNS_, _PickedSurf133
*End Assembly
*Distribution Table, name=Ori-1-DiscOrient_Table
coord3D, coord3D
*Distribution Table, name=Ori-1-DiscOrient-1_Table
coord3D, coord3D
*Distribution Table, name=Ori-2-DiscOrient_Table
coord3D, coord3D
*Distribution Table, name=Ori-1-DiscOrient-2_Table
coord3D, coord3D
**
** MATERIALS
**
*Material, name=FILL
*Density
 6.4e-06,
*Elastic
500., 0.2
*Material, name=NARCH
*Elastic
425., 0.2
*Material, name=RIB-ARCH
*Elastic
500., 0.2
*Material, name=WEB
*Elastic, type=LAMINA
5250.,   840.,    0.3, 470.27, 470.27, 470.27
**
** INTERACTION PROPERTIES
**
*Surface Interaction, name=GenInt
1.,
*Friction, slip tolerance=0.005
 0.7,
*Surface Behavior, pressure-overclosure=HARD
**
** BOUNDARY CONDITIONS
**
** Name: BaseSup Type: Symmetry/Antisymmetry/Encastre
*Boundary
_PickedSet138, PINNED
** Name: FillSup Type: Symmetry/Antisymmetry/Encastre
*Boundary
_PickedSet140, PINNED
** Name: VaultSym Type: Symmetry/Antisymmetry/Encastre
*Boundary
_PickedSet72, XSYMM
** Name: WallSup Type: Symmetry/Antisymmetry/Encastre
*Boundary
_PickedSet110, ENCASTRE
**
** INTERACTIONS
**
** Interaction: GenInt
*Contact
*Contact Inclusions, ALL EXTERIOR
*Contact Property Assignment
 ,  , GenInt
** ----------------------------------------------------------------
**
** STEP: STATIC
**
*Step, name=STATIC, nlgeom=NO
*Static
0.001, 1., 1e-08, 1.
**
** LOADS
**
** Name: DEAD   Type: Body force
*Dload
_PickedSet143, BY, -7.44e-05
** Name: FILL   Type: Gravity
*Dload
_PickedSet137, GRAV, 1., 0., -1., 0.
** Name: SW   Type: Body force
*Dload
_PickedSet141, BY, -5.4e-05
** Name: SW-webs   Type: Body force
*Dload
_PickedSet142, BY, -7.61e-05
**
** OUTPUT REQUESTS
**
*Restart, write, frequency=0
**
** FIELD OUTPUT: F-Output-1
**
*Output, field, variable=PRESELECT
**
** HISTORY OUTPUT: H-Output-1
**
*Output, history, variable=PRESELECT
*End Step
